# LAMMPS Input Script
# LAMMPS version: 27Jun2024
# Author: Simon Gravelle
# License: GNU General Public License v3.0
# Project: NMRfromMD – https://nmrdfrommd.github.io
# Description: Input file for simulating a PEG-water mixture

units real
atom_style full
bond_style harmonic
angle_style charmm
dihedral_style charmm
pair_style lj/cut/tip4p/long 6 7 6 9 0.1546 14.0
kspace_style pppm/tip4p 1.0e-5
special_bonds lj 0.0 0.0 0.5

read_data initial.data
include parameters-h2o.inc
include parameters-peg.inc

# define groups
group PEG type 1 2 3 4 5
group H2O type 6 7
group HYD type 3 5 7

# dynamics
timestep 0.1
fix myshk H2O shake 1.0e-5 200 0 b 6 a 9
fix mynve all nve/limit 0.1
fix myber all temp/berendsen 1 1 10

# output
thermo 1000
dump mydmp1 all atom 10000 equilibrate-all.lammpstrj

# run
run 10000
unfix mynve
unfix myber

# dynamics
timestep 0.5
fix mynvt all nvt temp 300 300 50

run 10000
unfix mynvt

# dynamics
timestep 1.0
fix mynpt all npt temp 300 300 100 iso 100 100 1000

# output
thermo 10000

# run
run 100000
unfix mynpt

# dynamics
fix mynpt all npt temp 300 300 100 iso 100 100 1000

# run
run 100000

write_data equilibrate.data
